// Exercise 3

module tape;
module residential {
	implicit_enduses NONE;
}

clock {
	timezone PST+8PDT;
	starttime '2001-01-01 00:00:00 PST';
	stoptime '2001-01-29 00:00:00 PST';
}

class player {
	double value;
}

object player {
	name THeat;
	file "exercise_1.player";
	loop 27;
}

object house {
	object player {
		property heating_setpoint;
		file "exercise_1.player";
		loop 27;
	};
}

object house {
	heating_setpoint THeat.value*1+2;
}
