// Exercise 4

module residential;
module tape;

clock {
	timezone PST+8PDT;
	starttime '2001-01-01 00:00:00 PST';
	stoptime '2002-01-01 00:00:00 PST';
}

object house {
	object recorder {
		property air_temperature;
		file "exercise_4.csv";
		interval 3600;
		limit 8760;
	};
}
